// SBML level 3 version 2

model biocrnpyler_368579()
  // model units - substance: mole, time: second, volume: litre, area: square_metre, length: metre, extent: mole

  // Compartments:
  compartment default = 1e-6;

  // Species:
  species dna_X in default = 0;
  species protein_RNAP_machinery in default = 0;
  species protein_sigma_machinery in default = 0;
  species protein_NT_units in default = 0;
  species rna_T_X in default = 0;
  species complex_protein_RNAP_machinery_protein_sigma_machinery_ in default = 0;
  species complex_complex_protein_RNAP_machinery_protein_sigma_machinery__dna_X_ in default = 0;
  species protein_Ribo_machinery in default = 0;
  species protein_AA_units0tl in default = 0;
  species protein_tRNA_machinery in default = 0;
  species protein_X in default = 0;
  species protein_unfolded_protein_degtag in default = 0;
  species protein_Et_machinery in default = 0;
  species protein_peptide_chain_peptide in default = 0;
  species protein_protease_machinery in default = 0;
  species complex_protein_AA_units0tl_protein_Et_machinery_ in default = 0;
  species complex_complex_protein_AA_units0tl_protein_Et_machinery__protein_tRNA_machinery_ in default = 0;
  species complex_protein_AA_units0tl_protein_tRNA_machinery_ in default = 0;
  species complex_complex_protein_AA_units0tl_protein_tRNA_machinery__protein_Ribo_machinery_rna_T_X_ in default = 0;
  species complex_protein_protease_machinery_protein_unfolded_protein_degtag_ in default = 0;
  species complex_protein_X_protein_protease_machinery_ in default = 0;
  species protein_RNAase_machinery in default = 0;
  species cell_count_count in default = 0;
  species complex_complex_protein_RNAP_machinery_protein_sigma_machinery__dna_X_open_ in default = 0;
  species complex_protein_AA_units0tl_protein_Et_machinery_amp_ in default = 0;
  species complex_complex_protein_AA_units0tl_protein_Et_machinery_amp__protein_tRNA_machinery_inactive_ in default = 0;
  species complex_complex_protein_AA_units0tl_protein_Et_machinery_amp__protein_tRNA_machinery_active_ in default = 0;
  species complex_protein_RNAase_machinery_rna_T_X_ in default = 0;

  // Parameters:
  k_tx_1b__bacterial_transcription = 0.0506 unit;
  k_tx_1u__bacterial_transcription = 13.66 unit;
  k_tx_2b__bacterial_transcription = 0.000197944 unit;
  k_tx_2u__bacterial_transcription = 0.05461 unit;
  n__ = 5.5 unit;
  c_max__logistic_cell_growth = 5.036667e8 dimensionless;
  k_tx_3__bacterial_transcription = 0.00232 unit;
  k_rnap__bacterial_transcription = 0.024963 unit;
  rnap_min__bacterial_transcription = 199.4 unit;
  k_tl_1b__bacterial_translation = 0.453 unit;
  k_tl_1u__bacterial_translation = 69930;
  k_tl_2__bacterial_translation = 39960 unit;
  k_tl_3__bacterial_translation = 9.958 unit;
  k_tl_4__bacterial_translation = 590.88;
  k_tl_5__bacterial_translation = 138.88 unit;
  k_tl_6b__bacterial_translation = 0.00197;
  k_tl_6u__bacterial_translation = 742.71;
  k_tl_7__bacterial_translation = 3.765 unit;
  b_tl_7__bacterial_translation = 1.17;
  k_tl_8__bacterial_translation = 0.1 unit;
  P_max__bacterial_translation = 31104 unit;
  b_tl_8__bacterial_translation = 0.5 unit;
  k_tRNA__bacterial_translation = 0.0109 unit;
  tRNA_min__bacterial_translation = 106.41 unit;
  k_ribo__bacterial_translation = 0.0055 unit;
  ribo_min__bacterial_translation = 173.15 unit;
  k_Et__bacterial_translation = 0.02099 unit;
  Et_min__bacterial_translation = 160.8 unit;
  k_tl_11__ = 0.0005 unit;
  k_tl_12__bacterial_translation = 515.476 unit;
  k_protease__bacterial_translation = 0.01603749 unit;
  protease_min__bacterial_translation = 175.9651 unit;
  k_tl_13b__ = 6.6885;
  k_tl_13u__ = 2544.593;
  k_tl_9__ = 0.1007 unit;
  k__logistic_cell_growth = 0.015781 unit;
  k_tx_4b__ = 2.5497 unit;
  k_tx_4u__ = 181.72 unit;
  b_tx_4u__mrna_degradation = 1 unit;
  n__mrna_degradation = 5.5 unit;
  k_tx_5__ = 1.881 unit;
  k_tl_10__ = 0.001 unit;

  // Reactions:
  r0: protein_sigma_machinery + protein_RNAP_machinery => complex_protein_RNAP_machinery_protein_sigma_machinery_; k_tx_1b__bacterial_transcription*protein_sigma_machinery*protein_RNAP_machinery;
  r0rev: complex_protein_RNAP_machinery_protein_sigma_machinery_ => protein_sigma_machinery + protein_RNAP_machinery; k_tx_1u__bacterial_transcription*complex_protein_RNAP_machinery_protein_sigma_machinery_;
  r1: complex_protein_RNAP_machinery_protein_sigma_machinery_ + dna_X => complex_complex_protein_RNAP_machinery_protein_sigma_machinery__dna_X_open_; k_tx_2b__bacterial_transcription*complex_protein_RNAP_machinery_protein_sigma_machinery_*dna_X;
  r2: complex_complex_protein_RNAP_machinery_protein_sigma_machinery__dna_X_open_ => complex_protein_RNAP_machinery_protein_sigma_machinery_ + dna_X; k_tx_2u__bacterial_transcription*complex_complex_protein_RNAP_machinery_protein_sigma_machinery__dna_X_open_*((cell_count_count/c_max__logistic_cell_growth)^n__/(1 + (cell_count_count/c_max__logistic_cell_growth)^n__));  // modifiers: cell_count_count
  r3: protein_NT_units + complex_complex_protein_RNAP_machinery_protein_sigma_machinery__dna_X_open_ => dna_X + protein_RNAP_machinery + rna_T_X + protein_sigma_machinery; k_tx_3__bacterial_transcription*protein_NT_units*complex_complex_protein_RNAP_machinery_protein_sigma_machinery__dna_X_open_;
  r4: => protein_RNAP_machinery; k_rnap__bacterial_transcription*(protein_RNAP_machinery + complex_protein_RNAP_machinery_protein_sigma_machinery_ + complex_complex_protein_RNAP_machinery_protein_sigma_machinery__dna_X_open_ - rnap_min__bacterial_transcription)*(1 - 2*cell_count_count/c_max__logistic_cell_growth);  // modifiers: complex_protein_RNAP_machinery_protein_sigma_machinery_, complex_complex_protein_RNAP_machinery_protein_sigma_machinery__dna_X_open_, cell_count_count
  r5: protein_AA_units0tl + protein_Et_machinery => complex_protein_AA_units0tl_protein_Et_machinery_; k_tl_1b__bacterial_translation*protein_AA_units0tl*protein_Et_machinery;
  r5rev: complex_protein_AA_units0tl_protein_Et_machinery_ => protein_AA_units0tl + protein_Et_machinery; k_tl_1u__bacterial_translation*complex_protein_AA_units0tl_protein_Et_machinery_;
  r6: complex_protein_AA_units0tl_protein_Et_machinery_ => complex_protein_AA_units0tl_protein_Et_machinery_amp_; k_tl_2__bacterial_translation*complex_protein_AA_units0tl_protein_Et_machinery_;
  r7: complex_protein_AA_units0tl_protein_Et_machinery_amp_ + protein_tRNA_machinery => complex_complex_protein_AA_units0tl_protein_Et_machinery_amp__protein_tRNA_machinery_inactive_; k_tl_3__bacterial_translation*complex_protein_AA_units0tl_protein_Et_machinery_amp_*protein_tRNA_machinery;
  r8: complex_complex_protein_AA_units0tl_protein_Et_machinery_amp__protein_tRNA_machinery_inactive_ => complex_complex_protein_AA_units0tl_protein_Et_machinery_amp__protein_tRNA_machinery_active_; k_tl_4__bacterial_translation*complex_complex_protein_AA_units0tl_protein_Et_machinery_amp__protein_tRNA_machinery_inactive_;
  r9: complex_complex_protein_AA_units0tl_protein_Et_machinery_amp__protein_tRNA_machinery_active_ => complex_protein_AA_units0tl_protein_tRNA_machinery_ + protein_Et_machinery; k_tl_5__bacterial_translation*complex_complex_protein_AA_units0tl_protein_Et_machinery_amp__protein_tRNA_machinery_active_;
  r10: complex_protein_AA_units0tl_protein_tRNA_machinery_ + protein_Ribo_machinery + rna_T_X => complex_complex_protein_AA_units0tl_protein_tRNA_machinery__protein_Ribo_machinery_rna_T_X_; k_tl_6b__bacterial_translation*complex_protein_AA_units0tl_protein_tRNA_machinery_*protein_Ribo_machinery*rna_T_X;
  r10rev: complex_complex_protein_AA_units0tl_protein_tRNA_machinery__protein_Ribo_machinery_rna_T_X_ => complex_protein_AA_units0tl_protein_tRNA_machinery_ + protein_Ribo_machinery + rna_T_X; k_tl_6u__bacterial_translation*complex_complex_protein_AA_units0tl_protein_tRNA_machinery__protein_Ribo_machinery_rna_T_X_;
  r11: complex_complex_protein_AA_units0tl_protein_tRNA_machinery__protein_Ribo_machinery_rna_T_X_ => rna_T_X + protein_Ribo_machinery + protein_unfolded_protein_degtag + protein_tRNA_machinery; k_tl_7__bacterial_translation*complex_complex_protein_AA_units0tl_protein_tRNA_machinery__protein_Ribo_machinery_rna_T_X_*(1 - cell_count_count/c_max__logistic_cell_growth + b_tl_7__bacterial_translation);  // modifiers: cell_count_count
  r12: protein_unfolded_protein_degtag => protein_X; k_tl_8__bacterial_translation*protein_unfolded_protein_degtag*(cell_count_count/c_max__logistic_cell_growth*(1 - cell_count_count/c_max__logistic_cell_growth)*(1 - (protein_unfolded_protein_degtag + protein_X)/P_max__bacterial_translation) + b_tl_8__bacterial_translation);  // modifiers: cell_count_count
  r13: => protein_tRNA_machinery; k_tRNA__bacterial_translation*(protein_tRNA_machinery + complex_complex_protein_AA_units0tl_protein_Et_machinery_amp__protein_tRNA_machinery_inactive_ + complex_complex_protein_AA_units0tl_protein_Et_machinery_amp__protein_tRNA_machinery_active_ + complex_protein_AA_units0tl_protein_tRNA_machinery_ + complex_complex_protein_AA_units0tl_protein_tRNA_machinery__protein_Ribo_machinery_rna_T_X_ - tRNA_min__bacterial_translation)*(1 - 2*cell_count_count/c_max__logistic_cell_growth);  // modifiers: complex_complex_protein_AA_units0tl_protein_Et_machinery_amp__protein_tRNA_machinery_inactive_, complex_complex_protein_AA_units0tl_protein_Et_machinery_amp__protein_tRNA_machinery_active_, complex_protein_AA_units0tl_protein_tRNA_machinery_, complex_complex_protein_AA_units0tl_protein_tRNA_machinery__protein_Ribo_machinery_rna_T_X_, cell_count_count
  r14: => protein_Ribo_machinery; k_ribo__bacterial_translation*(protein_Ribo_machinery + complex_complex_protein_AA_units0tl_protein_tRNA_machinery__protein_Ribo_machinery_rna_T_X_ - ribo_min__bacterial_translation)*(1 - 2*cell_count_count/c_max__logistic_cell_growth);  // modifiers: complex_complex_protein_AA_units0tl_protein_tRNA_machinery__protein_Ribo_machinery_rna_T_X_, cell_count_count
  r15: => protein_Et_machinery; k_Et__bacterial_translation*(protein_Et_machinery + complex_protein_AA_units0tl_protein_Et_machinery_ + complex_protein_AA_units0tl_protein_Et_machinery_amp_ + complex_complex_protein_AA_units0tl_protein_Et_machinery_amp__protein_tRNA_machinery_inactive_ + complex_complex_protein_AA_units0tl_protein_Et_machinery_amp__protein_tRNA_machinery_active_ - Et_min__bacterial_translation)*(1 - 2*cell_count_count/c_max__logistic_cell_growth);  // modifiers: complex_protein_AA_units0tl_protein_Et_machinery_, complex_protein_AA_units0tl_protein_Et_machinery_amp_, complex_complex_protein_AA_units0tl_protein_Et_machinery_amp__protein_tRNA_machinery_inactive_, complex_complex_protein_AA_units0tl_protein_Et_machinery_amp__protein_tRNA_machinery_active_, cell_count_count
  r16: protein_peptide_chain_peptide => protein_AA_units0tl; k_tl_11__*protein_peptide_chain_peptide;
  r17: => protein_AA_units0tl; k_tl_12__bacterial_translation*(1 - cell_count_count/c_max__logistic_cell_growth)*(cell_count_count/c_max__logistic_cell_growth);  // modifiers: cell_count_count
  r18: => protein_protease_machinery; k_protease__bacterial_translation*(protein_protease_machinery + complex_protein_protease_machinery_protein_unfolded_protein_degtag_ + complex_protein_X_protein_protease_machinery_ - protease_min__bacterial_translation)*(1 - 2*cell_count_count/c_max__logistic_cell_growth);  // modifiers: complex_protein_protease_machinery_protein_unfolded_protein_degtag_, complex_protein_X_protein_protease_machinery_, cell_count_count
  r19: protein_unfolded_protein_degtag + protein_protease_machinery => complex_protein_protease_machinery_protein_unfolded_protein_degtag_; k_tl_13b__*protein_unfolded_protein_degtag*protein_protease_machinery;
  r19rev: complex_protein_protease_machinery_protein_unfolded_protein_degtag_ => protein_unfolded_protein_degtag + protein_protease_machinery; k_tl_13u__*complex_protein_protease_machinery_protein_unfolded_protein_degtag_;
  r20: complex_protein_protease_machinery_protein_unfolded_protein_degtag_ => protein_peptide_chain_peptide + protein_protease_machinery; k_tl_9__*complex_protein_protease_machinery_protein_unfolded_protein_degtag_;
  r21: protein_X + protein_protease_machinery => complex_protein_X_protein_protease_machinery_; k_tl_13b__*protein_X*protein_protease_machinery;
  r21rev: complex_protein_X_protein_protease_machinery_ => protein_X + protein_protease_machinery; k_tl_13u__*complex_protein_X_protein_protease_machinery_;
  r22: complex_protein_X_protein_protease_machinery_ => protein_peptide_chain_peptide + protein_protease_machinery; k_tl_9__*complex_protein_X_protein_protease_machinery_;
  r23: => cell_count_count; k__logistic_cell_growth*cell_count_count*(1 - cell_count_count/c_max__logistic_cell_growth);
  r24: rna_T_X + protein_RNAase_machinery => complex_protein_RNAase_machinery_rna_T_X_; k_tx_4b__*rna_T_X*protein_RNAase_machinery;
  r25: complex_protein_RNAase_machinery_rna_T_X_ => rna_T_X + protein_RNAase_machinery; k_tx_4u__*complex_protein_RNAase_machinery_rna_T_X_*((cell_count_count/c_max__logistic_cell_growth)^n__mrna_degradation/(1 + (cell_count_count/c_max__logistic_cell_growth)^n__mrna_degradation) + b_tx_4u__mrna_degradation);  // modifiers: cell_count_count
  r26: complex_protein_RNAase_machinery_rna_T_X_ => protein_RNAase_machinery + protein_NT_units; k_tx_5__*complex_protein_RNAase_machinery_rna_T_X_;
  r27: protein_X => protein_peptide_chain_peptide; k_tl_10__*protein_X*((cell_count_count/c_max__logistic_cell_growth)^n__/(1 + (cell_count_count/c_max__logistic_cell_growth)^n__));  // modifiers: cell_count_count
  r28: protein_unfolded_protein_degtag => protein_peptide_chain_peptide; k_tl_10__*protein_unfolded_protein_degtag*((cell_count_count/c_max__logistic_cell_growth)^n__/(1 + (cell_count_count/c_max__logistic_cell_growth)^n__));  // modifiers: cell_count_count
  r29: rna_T_X => ; k__logistic_cell_growth*rna_T_X*(1 - cell_count_count/c_max__logistic_cell_growth);  // modifiers: cell_count_count
  r30: protein_AA_units0tl => ; k__logistic_cell_growth*protein_AA_units0tl*(1 - cell_count_count/c_max__logistic_cell_growth);  // modifiers: cell_count_count
  r31: protein_X => ; k__logistic_cell_growth*protein_X*(1 - cell_count_count/c_max__logistic_cell_growth);  // modifiers: cell_count_count
  r32: protein_unfolded_protein_degtag => ; k__logistic_cell_growth*protein_unfolded_protein_degtag*(1 - cell_count_count/c_max__logistic_cell_growth);  // modifiers: cell_count_count
  r33: protein_peptide_chain_peptide => ; k__logistic_cell_growth*protein_peptide_chain_peptide*(1 - cell_count_count/c_max__logistic_cell_growth);  // modifiers: cell_count_count

  // Unit definitions:
  unit square_metre = metre^2;
end
